// COMSOL Multiphysics 5.4.0.225 model "Gyromagnetic_photonic_crystal.mph"
// Outline of the model tree

Parameters
  a = 1 [um]
  r = 0.13*a
  Kx = pi/a  // shift in kx
  Ky = pi/a  // shift in ky
  nkx = 0
  nky = 0
  kx = Kx+nkx*pi/a
  ky = Ky+nky*pi/a

Geometry
  geom1 "Geometry 1" (2D, length unit m)
    r1: Rectangle | size = {a, a}
    c1: Circle | pos = {a/2, a/2}; r = r
    fin: Finalize "Form Union"

Materials
  mat1: Common "Material 1" on all domains
    def "Basic"
      relpermittivity = 1
      relpermeability = 1
      electricconductivity = 0
    RefractiveIndex
      n = 1
      ki = 0
  mat2: Common "Material 2" on domains 2
    def "Basic"
      relpermittivity = 13
      relpermeability = 1
      electricconductivity = 0
    RefractiveIndex
      n = sqrt(13)
      ki = 0

Physics
  ewfd: ElectromagneticWavesFrequencyDomain on all domains
    dependent variable E = {Ex, Ey, Ez}
    components.components = outofplane
    wee1: WaveEquationElectric (default) | DisplacementFieldModel = RelativePermittivity; mur_mat = from_mat
    pec1: PerfectElectricConductor (default)
    init1: init "Initial Values 1" (default)
    wee2: WaveEquationElectric on domains 2
      DisplacementFieldModel = RelativePermittivity
      mur_mat = userdef
      mur = {1, -0.4*i, 0, 0.4*i, 1, 0, 0, 0, 1}
    pc1: PeriodicCondition on boundaries 1, 4
      PeriodicType = Floquet
      kFloquet = {kx, ky, 0}
      destinationDomains: boundaries 4
    pc2: PeriodicCondition on boundaries 2, 3
      PeriodicType = Floquet
      kFloquet = {kx, ky, 0}
      destinationDomains: boundaries 3

Mesh
  mesh1 "Mesh 1"
    size: MeshSizeDefault | hmax = 6.7E-8; hmin = 3.0E-10; hcurve = 0.3; hgrad = 1.3
    edg1: Edge on boundaries 1, 2
    cpe1: CopyEdge | source = boundaries 1, 2; destination = boundaries 3, 4
    ftri1: FreeTri "Free Triangular 1" on remaining entities

Studies
  std1 "Study 1"
    eig: Eigenfrequency
      neigs = 5
      eigunit = THz
      useparam = on
      sweeptype = filled
      pname = {nkx, nky}
      plistarr = {range(-0.5,0.05,0.55), range(-0.5,0.05,0.55)}
      punit = {, }

Tables
  tbl2: Table
    // Global Evaluation 1 (ewfd.freq/(c_const/a))
    Eigenfrequency (THz) | ewfd.freq/(c_const/a) (1)
    105.016+5.97764e-15i | 0.350296
    185.507+4.03721e-14i | 0.618786
    205.846-1.39753e-12i | 0.686627
    211.665+2.85404e-12i | 0.706039
    276.167-3.057e-07i | 0.921193