// COMSOL Multiphysics 5.4.0.225 model "Gyromagnetic_photonic_crystal.mph"
// Outline of the model tree

Parameters
  a = 1 [um]
  r = 0.13*a
  Kx = 4*pi/3/a  // shift in kx
  Ky = 0  // shift in ky
  nk1 = 0
  nk2 = 0
  kx = Kx+nk1*k1x+nk2*k2x
  ky = Ky+nk1*k1y+nk2*k2y
  k1x = 2*pi/a
  k1y = -2*pi/sqrt(3)/a
  k2x = 0
  k2y = 4*pi/sqrt(3)/a

Geometry
  geom1 "Geometry 1" (2D, length unit m)
    pol1: Polygon | source = table; table = {{0, 0}, {a, 0}, {1.5*a, sqrt(3)/2*a}, {0.5*a, sqrt(3)/2*a}}
    c1: Circle | pos = {a/2+a/4, a*sqrt(3)/4}; r = r
    par1: Partition "Partition Objects 1" | input = pol1; tool = c1
    fin: Finalize "Form Union"

Materials
  mat1: Common "Material 1" on domains 1
    def "Basic"
      relpermittivity = 1
      relpermeability = 1
      electricconductivity = 0
    RefractiveIndex
      n = 1
      ki = 0
  mat2: Common "Material 2" on domains 2
    def "Basic"
      relpermittivity = 13
      relpermeability = 1
      electricconductivity = 0
    RefractiveIndex
      n = sqrt(13)
      ki = 0

Physics
  ewfd: ElectromagneticWavesFrequencyDomain on all domains
    dependent variable E = {Ex, Ey, Ez}
    components.components = outofplane
    wee1: WaveEquationElectric (default) | DisplacementFieldModel = RelativePermittivity; mur_mat = from_mat
    pec1: PerfectElectricConductor (default)
    init1: init "Initial Values 1" (default)
    wee2: WaveEquationElectric on domains 2
      DisplacementFieldModel = RelativePermittivity
      mur_mat = userdef
      mur = {1, -0.4*i, 0, 0.4*i, 1, 0, 0, 0, 1}
    pc1: PeriodicCondition on boundaries 1, 4
      PeriodicType = Floquet
      kFloquet = {kx, ky, 0}
      destinationDomains: boundaries 4
    pc2: PeriodicCondition on boundaries 2, 3
      PeriodicType = Floquet
      kFloquet = {kx, ky, 0}
      destinationDomains: boundaries 3

Mesh
  mesh1 "Mesh 1"
    size: MeshSizeDefault | hmax = 1.01E-7; hmin = 4.5E-10; hcurve = 0.3; hgrad = 1.3
    edg1: Edge on boundaries 1, 2
      size1: Size on boundaries 1, 2 | hauto = 4
    cpe1: CopyEdge | source = boundaries 1, 2; destination = boundaries 3, 4
    ftri1: FreeTri "Free Triangular 1" on remaining entities
      size1: Size on domains 2 | hauto = 3

Studies
  std1 "Study 1"
    eig: Eigenfrequency
      neigs = 5
      eigunit = THz
      shift = 1
      eigwhich = lr
      useparam = on
      sweeptype = filled
      pname = {nk1, nk2}
      plistarr = {range(-0.3,0.025,0.3), range(-0.3,0.025,0.3)}
      punit = {, }

Tables
  tbl2: Table
    // Global Evaluation 1 (ewfd.freq/(c_const/a))
    nk1 | nk2 | Eigenfrequency (THz) | ewfd.freq/(c_const/a) (1)
    0 | 0 | 102.826-7.55634e-13i | 0.342991
    0 | 0 | 179.906-6.91665e-13i | 0.600103
    0 | 0 | 196.13+1.30265e-12i | 0.654221
    0 | 0 | 263.968+2.06448e-09i | 0.880504
    0 | 0 | 285.902-8.17905e-07i | 0.953665
  tbl3: Table
    // Surface Integration 1 (ewfd.Ez*conj(ewfd.Ez)*ewfd.epsilonrxx)
    nkx | nky | Eigenfrequency (THz) | ewfd.epsilonrxx*ewfd.Ez*conj(ewfd.Ez) (kg^2*m^4/(s^6*A^2))
    -0.15 | -0.15 | 101.278-2.23003e-12i | 2.38524e-12-1.4934e-30i
    -0.15 | -0.15 | 174.16-4.16278e-12i | 1.33431e-12+5.507e-31i
    -0.15 | -0.15 | 204.59+8.79267e-13i | 1.23114e-12+4.63052e-31i
    -0.15 | -0.15 | 261.273+1.10259e-07i | 1.75065e-12+2.25574e-31i
    -0.15 | -0.15 | 282.945-4.56689e-06i | 2.32083e-12-1.03559e-30i